// COMSOL Multiphysics 4.2 (Build: 228) model "nonlinear_analysis_0.mph"
// Linear buckling analysis
// Outline of the model tree

Parameters
  L = 20e-6 [m]  // Length of stamp
  H = 3e-6 [m]  // Height of stamp
  W = 1e-3 [m]  // Width of stamp
  hf = 20e-9[m]  // Thickness of top film
  epsilonp = 5e-3  // Initial prestretch strain
  epsilon0 = 0  // Final strain
  epsilon = 0  // Current strain value (varies from epsilonp to epsilon0)
  nsteps = 50  // Number of steps for load ramp-up
  Et = 70e9 [Pa]  // Young's modulus of top layer
  Mub = 2e6 [Pa]  // Modulus of base layer

Geometry
  geom1 "Geometry 1" (2D, length unit µm)
    fin: Finalize "Form Union"

Materials
  mat1 "Silica glass" on all domains
    def "Basic"
      relpermeability = 1
      electricconductivity = 1e-14[S/m]
      thermalexpansioncoefficient = 0.55e-6[1/K]
      heatcapacity = 703[J/(kg*K)]
      relpermittivity = 2.09
      density = 2203[kg/m^3]
      thermalconductivity = 1.38[W/(m*K)]
    Enu "Young's modulus and Poisson's ratio"
      youngsmodulus = Et
      poissonsratio = 0.17
    RefractiveIndex
      n = 1.45
      ki = 0
  mat3 "PDMS elastic" on domains 1
    def "Basic"
      relpermeability = 1
      electricconductivity = 3.030e7[S/m]
      thermalexpansioncoefficient = 23.4e-6[1/K]
      heatcapacity = 900[J/(kg*K)]
      relpermittivity = 1
      density = 0.9700[kg/m^3]
      thermalconductivity = 201[W/(m*K)]
    Enu "Young's modulus and Poisson's ratio"
      youngsmodulus = 20e6[Pa]
      poissonsratio = 0.49
    NeoHookean
      mu = Mub
      lambda = 1.33e6

Physics
  solid: SolidMechanics on all domains
    dependent variable u = {u, v, w}
    d.d = W
    lemm1: LinearElasticModel "Linear Elastic Material Model 1" (default) | AdvMatRes = 1
      iss1: InitialStressandStrain on domains 2 | eil = diag{epsilonp, -mat1.Enu.nu*epsilonp, 0}
    free1: Free (default)
    init1: init "Initial Values 1" (default)
    hmm1: HyperelasticModel "Hyperelastic Material Model 1" on domains 1
      kappa = 2e9
      NearlyIncompressible = 1
      minput_velocity_src = root.mod1.solid.u_tX
    sym1: SymmetrySolid "Symmetry 1" on boundaries 1, 3
    roll1: Roller on boundaries 2
    disp2: Displacement1 "Prescribed Displacement 2" on boundaries 6, 7 | U0 = {L*epsilon, 0, 0}; Direction = {1, 0, 0}

Mesh
  mesh1 "Mesh 1"
    imp1: Import
      source = native
      filename = C:\User Data\Sourabh\GPL release\Processing individual studies.\Analysis files.\newmesh_0.mphtxt

Studies
  std3 "Study 3"
    stat: Stationary | useparam = on; pname = epsilon; plist = range(epsilonp,(epsilon0-epsilonp)/(nsteps-1),epsilon0)

Solver configurations
  sol1 "Solver 1" (study std3)
    v1: Variables "Dependent Variables 1"
      mod1_solid_pw: Field | scalemethod = manual; scaleval = 0.1
    s1: Stationary "Stationary Solver 1"
      dDef: Direct | linsolver = pardiso
      fc1: FullyCoupled
      pDef: Parametric | pname = epsilon; plist = range(epsilonp,(epsilon0-epsilonp)/(nsteps-1),epsilon0)

Datasets
  dset1: Solution | solution = sol1
  cln1: CutLine2D | data = dset1; genpoints = {{0, 0}, {1, 0}}

Plots
  pg1: PlotGroup2D "Stress (solid)" | data = dset1
    surf1: Surface | expr = solid.mises; unit = MPa
      def: Deform "Deformation" | expr = {u, v}

Exports
  data1: Data
    data = dset1
    expr = {u, v}
    unit = {µm, µm}
    descr = {"Displacement field, X component", "Displacement field, Y component"}
    location = file