// COMSOL Multiphysics 4.2 (Build: 228) model "linear.mph"
// Linear buckling analysis for pre-stretch of bilayers
// Outline of the model tree

Parameters
  L = 20e-6 [m]  // Length of stamp
  H = 3e-6 [m]  // Height of stamp
  W = 1e-3 [m]  // Thickness of stamp
  hf = 19.17e-9 [m]  // Thickness of top layer
  epsilonp = 1e-3  // Initial prestretch strain
  epsilon0 = 0  // Final strain
  epsilon = 0  // Current strain value (varies from epsilonp to epsilon0)
  Et = 70e9 [Pa]  // Young's modulus
  Mub = 0.896e6 [Pa]  // Modulus of bottom layer
  nsteps = 25  // Number of steps for nonlinear study/Not used here

Geometry
  geom1 "Geometry 1" (2D, length unit µm)
    r1: Rectangle | pos = {0, 0}; size = {L, H}
    r2: Rectangle | pos = {0, H}; size = {L, hf}
    fin: Finalize "Form Union"

Materials
  mat1 "Silica glass" on all domains
    def "Basic"
      relpermeability = 1
      electricconductivity = 1e-14[S/m]
      thermalexpansioncoefficient = 0.55e-6[1/K]
      heatcapacity = 703[J/(kg*K)]
      relpermittivity = 2.09
      density = 2203[kg/m^3]
      thermalconductivity = 1.38[W/(m*K)]
    Enu "Young's modulus and Poisson's ratio"
      youngsmodulus = Et
      poissonsratio = 0.17
    RefractiveIndex
      n = 1.45
      ki = 0
  mat3 "PDMS elastic" on domains 1
    def "Basic"
      relpermeability = 1
      electricconductivity = 3.030e7[S/m]
      thermalexpansioncoefficient = 23.4e-6[1/K]
      heatcapacity = 900[J/(kg*K)]
      relpermittivity = 1
      density = 0.9700[kg/m^3]
      thermalconductivity = 201[W/(m*K)]
    Enu "Young's modulus and Poisson's ratio"
      youngsmodulus = 20e6[Pa]
      poissonsratio = 0.49
    NeoHookean
      mu = Mub
      lambda = 1.33e6

Physics
  solid: SolidMechanics on all domains
    dependent variable u = {u, v, w}
    d.d = W
    lemm1: LinearElasticModel "Linear Elastic Material Model 1" (default) | AdvMatRes = 1
      iss1: InitialStressandStrain on domains 2 | eil = diag{epsilonp, -mat1.Enu.nu*epsilonp, 0}
    free1: Free (default)
    init1: init "Initial Values 1" (default)
    hmm1: HyperelasticModel "Hyperelastic Material Model 1" on domains 1
      kappa = 2e9
      NearlyIncompressible = 1
      minput_velocity_src = root.mod1.solid.u_tX
    sym1: SymmetrySolid "Symmetry 1" on boundaries 1, 3
    roll1: Roller on boundaries 2
    disp2: Displacement1 "Prescribed Displacement 2" on boundaries 6, 7
      U0 = {L*epsilonp*0.9, 0, 0}
      Direction = {1, 0, 0}

Mesh
  mesh1 "Mesh 1"
    size: MeshSizeDefault | hmax = 1.34; hmin = 0.0060; hcurve = 0.3; hnarrow = 1; hgrad = 1.3; hauto = 5
    ftri1: FreeTri "Free Triangular 1" on remaining entities

Studies
  std3 "Study 3"
    stat: Stationary
    buckling: LinearBuckling | neigs = 25

Solver configurations
  sol1 "Solver 1" (study std3)
    v1: Variables "Dependent Variables 1"
    s1: Stationary "Stationary Solver 1"
      dDef: Direct | linsolver = pardiso
      fc1: FullyCoupled
    su1: StoreSolution
    v2: Variables "Dependent Variables 2" | initmethod = sol; notsolmethod = sol
    e1: Eigenvalue "Eigenvalue Solver 1" | neigs = 25; transform = critical_load_factor; linpmethod = sol
      dDef: Direct | linsolver = pardiso
  sol2 "Store Solution 2"

Datasets
  dset1: Solution | solution = sol1
  dset2: Solution | solution = sol2

Plots
  pg1: PlotGroup2D "Mode Shape (solid)" | data = dset1
    surf1: Surface | expr = solid.disp
      def: Deform "Deformation" | expr = {u, v}

Exports
  mesh1: Mesh | data = dset1
  data1: Data
    data = dset1
    expr = {u, v}
    unit = {µm, µm}
    descr = {"Displacement field, X component", "Displacement field, Y component"}
    location = file