// COMSOL Multiphysics 4.2 (Build: 228) model "linear.mph"
// Outline of the model tree

Parameters
  L = 10 [um]  // Length of plate
  W = L/2 [um]  // Multiplier for Width of plate: W=Wm*L
  hf = 25.4e-3 [um]  // Height of plate
  H = 3 [um]  // Height of foundation
  epsilonp = 0  // Initial prestretch
  epsilon = 1e-4  // Current compression
  epsilon0 = 0  // Final compression
  Et = 70e9 [Pa]  // Modulus of top layer
  Mub = 2e6 [Pa]  // Modulus of bottom layer
  nsteps = 25  // Number of eigen values

Geometry
  geom1 "Geometry 1" (3D, length unit µm)
    blk1: Block | size = {L, W, H}
    blk2: Block | pos = {0, 0, H}; size = {L, W, hf}
    fin: Finalize "Form Union"

Materials
  mat1 "Silica glass" on domains 2
    def "Basic"
      relpermeability = 1
      electricconductivity = 1e-14[S/m]
      thermalexpansioncoefficient = 0.55e-6[1/K]
      heatcapacity = 703[J/(kg*K)]
      relpermittivity = 2.09
      density = 2203[kg/m^3]
      thermalconductivity = 1.38[W/(m*K)]
    Enu "Young's modulus and Poisson's ratio"
      youngsmodulus = Et
      poissonsratio = 0.17
    RefractiveIndex
      n = 1.45
      ki = 0
  mat3 "PDMS" on domains 1
    def "Basic"
      relpermeability = 1
      electricconductivity = 3.030e7[S/m]
      thermalexpansioncoefficient = 23.4e-6[1/K]
      heatcapacity = 900[J/(kg*K)]
      relpermittivity = 1
      density = 0.9700[kg/m^3]
      thermalconductivity = 201[W/(m*K)]
    Enu "Young's modulus and Poisson's ratio"
      youngsmodulus = 20e6[Pa]
      poissonsratio = 0.49
    NeoHookean
      mu = Mub
      lambda = 2e9

Physics
  solid: SolidMechanics on all domains
    dependent variable u = {u, v, w}
    lemm1: LinearElasticModel "Linear Elastic Material Model 1" (default) | AdvMatRes = 1
      iss1: InitialStressandStrain (disabled) on all domains | eil = diag{epsilonp, 0, -mat1.Enu.nu*epsilonp}
    free1: Free (default)
    init1: init "Initial Values 1" (default)
    hmm1: HyperelasticModel "Hyperelastic Material Model 1" on domains 1
      kappa = 3e9
      NearlyIncompressible = 1
      minput_velocity_src = root.mod1.solid.u_tX
    sym1: SymmetrySolid "Symmetry along x" on boundaries 1, 4
    disp2: Displacement2 "Zero x displacement" (disabled) on boundaries 1, 4 | Direction = {1, 0, 0}
    disp1: Displacement2 "Applied compression" on boundaries 10, 11 | U0 = {-epsilon*L, 0, 0}; Direction = {1, 0, 0}
    roll1: Roller "Roller z base" on boundaries 3
    disp3: Displacement2 "Zero y displacement" (disabled) on boundaries 2, 5, 8, 9 | Direction = {0, 1, 0}
    pc1: PeriodicCondition "Periodic Condition on y faces" (disabled) on boundaries 2, 5, 8, 9
      PeriodicInDirection = {0, 0, 1}
    bndl1: BoundaryLoad (disabled) on boundaries 2, 8
      LoadType = FollowerPressure
      FollowerPressure = -mat3.Enu.nu*epsilonp*0.9*mat3.Enu.E
    pc2: PeriodicCondition "Periodic Condition on x faces" on boundaries 1, 4, 10, 11 | PeriodicInDirection = {0, 0, 1}
    sym2: SymmetrySolid "Symmetry along y" on boundaries 2, 5

Mesh
  mesh3 "Plate top swept"
    size: MeshSizeDefault | hmax = 0.25; hmin = 0.015; hcurve = 0.3; hnarrow = 0.85; hgrad = 1.35; hauto = 2
    ftri1: FreeTri "Free Triangular 1" on boundaries 6
    swe1: Sweep "Swept 1" on domains 2 | facemethod = tri; sourceface = boundaries 6; targetface = boundaries 7
      dis1: Distribution on domains 2 | numelem = 3
    ftet1: FreeTet "Free Tetrahedral 1" on remaining entities
      size1: Size on entire geometry | hauto = 5

Studies
  std1 "Study 1"
    stat: Stationary
    buckling: LinearBuckling | neigs = 25

Solver configurations
  sol1 "Solver 1" (study std1)
    v1: Variables "Dependent Variables 1"
    s1: Stationary "Stationary Solver 1"
      dDef: Direct
      fc1: FullyCoupled
    su1: StoreSolution
    v2: Variables "Dependent Variables 2" | initmethod = sol; notsolmethod = sol
    e1: Eigenvalue "Eigenvalue Solver 1" | neigs = 25; transform = critical_load_factor; linpmethod = sol
      dDef: Direct | linsolver = pardiso
  sol2 "Store Solution 2"

Datasets
  dset1: Solution | solution = sol1
  dset2: Solution | solution = sol2

Plots
  pg1: PlotGroup3D "3D Plot Group 1" | data = dset1
    surf1: Surface | expr = solid.disp
      def: Deform "Deformation" | expr = {u, v, w}

Exports
  mesh1: Mesh | data = dset1; filename = random
  data1: Data
    data = dset1
    expr = {u, v, w}
    unit = {µm, µm, µm}
    descr = {"Displacement field, X component", "Displacement field, Y component", "Displacement field, Z component"}
    filename = any
    location = file
    coordfilename = new